freq[0] := 10  # Гц
amp[0] := 20
freqr[0] := 500  # disabled
NS := 5000
NF := 11
ampf(f) :=
    amp ← 0 if f < 100
    ampt ← 1 if 100 ≤ f ≤ 500
    ampt ← 1/f*500 if 500 < f < 1000
    ampt ← 0.5 if 1500 ≥ f ≥ 1000
    ampt ← 0 if f > 1500
    return ampt  # disabled
freq[1] := 500  # Гц
amp[1] := 18
freqr[1] := 512  # disabled
dfreq := 10000
freq[2] := 1000  # Гц
amp[2] := 16
freqr[2] := 513  # disabled
dtime := 1/dfreq = 0.0001
freq[3] := 1500  # Гц
amp[3] := 14
freqr[3] := 514  # disabled
dn := dfreq/NS = 2
freq[4] := 2000  # Гц
amp[4] := 12
freqr[4] := 515  # disabled
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i := 0, 1 .. NS
freq[5] := 2500  # Гц
amp[5] := 10
freqr[5] := 516  # disabled
ns[i] := 1 + i
freq[6] := 3000  # Гц
amp[6] := 9
freqr[6] := 517  # disabled
time[i] := ns[i]*dtime
freq[7] := 3500  # Гц
amp[7] := 7
freqr[7] := 518  # disabled
freq[8] := 4000  # Гц
amp[8] := 5
freqr[8] := 519  # disabled
freq[9] := 4500  # Гц
amp[9] := 3
freqr[9] := 520  # disabled
freq[10] := 5000  # Гц
amp[10] := 3
freqr[10] := 521  # disabled
freq[11] := 522  # Гц
amp[11] := 3
freqr[11] := 522  # disabled
freq[12] := 524  # Гц
amp[12] := 3
freqr[12] := 523  # disabled
ifreqf := 0, 1 .. 500  # disabled
freqf[ifreqf] := ifreqf*10  # disabled
freq[13] := 526  # Гц
amp[13] := 1
freqr[13] := 524  # disabled
f(x) := sum(ampf(freqf[i])*(cos(2*π*freqf[i]*x) + 1), i = 0 .. 500 - 1)  # disabled
f(x) := sum(amp[i]*(cos(2*π*freq[i]*x) + 1), i = 0 .. NF - 1)
s[i] := f(time[i])
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sc := ceil(s)
logFreq(amp) :=
    for iii ∈ 0, 1 .. NF - 1
        v[iii] ← 0 if amp[iii] == 0
        v[iii] ← 1 otherwise
    return v
S(freq) :=
    k ← round(freq/dn, 1)
    alpha ← 2*cos(2*π*k/NS)
    Wre ← cos(2*π*k/NS)
    Wim ← sin(2*π*k/NS)
    vm1 ← 0
    vm2 ← 0
    for iii ∈ 0, 1 .. NS - 1
        scp[iii] ← sc[iii]*13/256
        v[iii] ← scp[iii] + alpha*vm1 - vm2 if iii == 0
        v[iii] ← scp[iii] + alpha*v[iii - 1] - vm1 if iii == 1
        v[iii] ← scp[iii] + alpha*v[iii - 1] - v[iii - 2] otherwise
        iii ← iii + 1
    vWre ← v[NS - 1]*Wre - v[NS - 2]
    vWim ← v[NS - 1]*Wim
    S ← (vWre^2 + vWim^2)*(39.3939/NS)^2
    M[0] ← S
    M[1] ← v
    M[2] ← Wre
    M[3] ← Wim
    M[4] ← vWre
    M[5] ← vWim
    M[6] ← alpha
    return M
S(freq[0])[1] =  # no stored result
S(freq[0])[1][NS - 1] = 2559.45
# [component: outputs vdata]
i := 0, 1 .. NF - 1
S[i] := S(freq[i])[0]
lF := logFreq(amp)
vdata = ["x"; "x"; "x"; "x"; "x"; "x"; "x"; "x"; "x"; "x"; "x"; "x"]
amp = [20; 18; 16; 14; 12; 10; 9; 7; 5; 3; 3; 3; 3; 1]
round(sqrt(S), 0) = [20; 18; 16; 14; 12; 10; 9; 7; 5; 3; 6]
sqrt(S) = [19.9743; 17.9969; 15.9962; 14.0032; 11.9992; 10.0012; 9.00011; 6.99931; 5.00317; 3.00565; 6.00662]
amp = [20; 18; 16; 14; 12; 10; 9; 7; 5; 3; 3; 3; 3; 1]
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ceil(s) =  # no stored result
freq = [10; 500; 1000; 1500; 2000; 2500; 3000; 3500; 4000; 4500; 5000; 522; 524; 526]
lF = [1; 1; 1; 1; 1; 1; 1; 1; 1; 1; 1]
round(S, 0) = [399; 324; 256; 196; 144; 100; 81; 49; 25; 9; 36]
# D:\Desktop\Study_now\SRW\GoertzelAlgorithm\src\sim\data\sample.csv
# D:\Desktop\Study_now\SRW\GoertzelAlgorithm\src\sim\data\freq.csv
# D:\Desktop\Study_now\SRW\GoertzelAlgorithm\src\sim\data\logic.csv
# D:\Desktop\Study_now\SRW\GoertzelAlgorithm\src\sim\data\data.csv
